units		lj
atom_style	atomic
atom_modify	map hash

lattice		fcc 0.8442
region		box block 0 12 0 12 0 12

create_box	1 box
create_atoms	1 box
mass		1 1.0

velocity	all create 0.02 87287 loop geom

pair_style	lj/cut 2.5
pair_coeff	1 1 1.0 1.0 2.5

neighbor	0.3 bin
neigh_modify	delay 0 every 20 check yes

fix		1 all nve
